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p := 10^-12
n := 10^-9
u := 10^-6
m := 10^-3
k := 10^3
M := 10^6
V_IN := 22.2
V_OUT := 5
I_OUT := 1
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R_2 := 6.8 k
R_1 := R_2*(V_OUT/0.8 - 1) = 35.7 k
R_1 := 36 k
V_OUT := 0.8*(R_1/R_2 + 1) = 5.03529
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f_sw := 500 k
ΔI_L := 0.4*2
L := V_OUT*(V_IN - V_OUT)/(V_IN*ΔI_L*f_sw) = 9.73303 u
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I_L_PEAK := I_OUT + ΔI_L/2 = 1.4
